// SBML level 2 version 1

model untitled()

  // Compartments:
  compartment default = 1;
  compartment cytoplasm in default = 1;
  compartment nucleus in cytoplasm = 1;

  // Species:
  species EGF in cytoplasm = 80;
  species EGFR in cytoplasm = 80;
  species EF_R_cpx in cytoplasm = 0;
  species ATP in cytoplasm = 80;
  species ADP in cytoplasm = 0;
  species EF_R_cpx_p in cytoplasm = 0;
  species PLC in cytoplasm = 10;
  species EF_R_pLC_cpx_p in cytoplasm = 0;
  species EF_R_cpx2_p in cytoplasm = 0;
  species PLC_p in cytoplasm = 0;
  species s20 in cytoplasm = 10; s20 is "PKC";
  species s21 in cytoplasm = 0; s21 is "PKC*";
  species s22 in cytoplasm = 100; s22 is "RAF";
  species s23 in cytoplasm = 0; s23 is "RAF*";
  species MEK in cytoplasm = 120;
  species ERK in cytoplasm = 100;
  species ERKp in cytoplasm = 0;
  species ERKpp in cytoplasm = 0;
  species MEKp in cytoplasm = 0;
  species MEPpp in cytoplasm = 0;
  species RSK in cytoplasm = 50;
  species RSKp in cytoplasm = 0;
  species inhibitor in cytoplasm = 20;
  species RSKpp in cytoplasm = 0;
  species RSKpp_n in nucleus = 0;
  species CREB in nucleus = 100;
  species CREBp in nucleus = 0;

  // Reactions:
  re1: EGF + EGFR => EF_R_cpx; EGF*EGFR*re1_k1;
    re1_k1 = 0.003;
  re2: EF_R_cpx + ATP => EF_R_cpx_p + ADP; EF_R_cpx*ATP*re2_k1;
    re2_k1 = 1;
  re3: EF_R_cpx_p + PLC => EF_R_pLC_cpx_p; EF_R_cpx_p*PLC*re3_k1;
    re3_k1 = 0.06;
  re4: EF_R_pLC_cpx_p => EF_R_cpx2_p + PLC_p; EF_R_pLC_cpx_p*re4_k1;
    re4_k1 = 0.3;
  re5: PLC_p + s20 => s21; PLC_p*s20*re5_k1;
    re5_k1 = 0.214;
  re6: s22 => s23; s21*re6_kcat*s22/re6_km + s22;  // modifiers: s21
    re6_kcat = 64; re6_km = 4;
  re7: MEK => MEKp; s23*re7_kcat*MEK/(re7_km + MEK);  // modifiers: s23
    re7_kcat = 3.5; re7_km = 317;
  re8: MEKp => MEPpp; s23*MEKp*re8_v2/(re8_k2 + MEKp);  // modifiers: s23
    re8_k2 = 317; re8_v2 = 2.9;
  re9: ERK => ERKp; MEPpp*ERK*v1/(re9_k1 + ERK);  // modifiers: MEPpp
    v1 = 9.5; re9_k1 = 146000;
  re10: ERKp => ERKpp; MEPpp*ERKp*re10_v2/(re10_k2 + ERKp);  // modifiers: MEPpp
    re10_v2 = 16; re10_k2 = 146000;
  re12: RSK => RSKp; re12_kcat*ERKpp*(RSK + RSK)/(re12_k2 + RSK + re12_k2*(inhibitor/ki));  // modifiers: inhibitor, ERKpp
    re12_kcat = 0.017; ki = 1; re12_k2 = 976;
  re13: RSKp => RSKpp; ERKpp*RSKp*re13_k1/(re13_k2 + RSKp);  // modifiers: ERKpp
    re13_k1 = 0.0017; re13_k2 = 97.6;
  re14: RSKpp => RSKpp_n; RSKpp*k;
    k = 0.4;
  re15: CREB => CREBp; RSKpp_n*CREB*vc/(kc + CREB);  // modifiers: RSKpp_n
    vc = 104.2; kc = 11.2;
end
