// SBML level 2 version 1

model untitled()

  // Compartments:
  compartment default = 1 volume;

  // Species:
  species s1 in default = 1;
  species s2 in default = 0;
  species s3 in default = 0;

  // Reactions:
  // Convenience kinetics
  re1: s1 + s2 => s3; vmax_re1*(s1*default/kmc_re1_s1)*(s2*default/kmc_re1_s2)/((1 + s1*default/kmc_re1_s1)*(1 + s2*default/kmc_re1_s2));
    vmax_re1 = 1 substance_per_time; kmc_re1_s1 = 1 substance; kmc_re1_s2 = 1 substance;

  // Unit definitions:
  unit substance = 1e-3 mole; substance is "Predefined unit substance";
  unit volume = 1e-3 litre; volume is "Predefined unit volume";
  unit substance_per_time = 1e-3 mole / second;
end
