// SBML level 2 version 4

model untitled()

  // Compartments:
  compartment default = 1 volume;

  // Species:
  species s1 in default = 0;
  species s2 in default = 0;
  species s3 in default = 0;

  // Reactions:
  re1: s1 => s2; s3*default*(kcat_re1_s3*(s1*default/kmc_re1_s1_s3)/(1 + s1*default/kmc_re1_s1_s3));  // modifiers: s3
    kcat_re1_s3 = 1 per_second; kmc_re1_s1_s3 = 1 substance;

  // Unit definitions:
  unit substance = 1e-3 mole;
  unit volume = 1e-3 litre;
  unit area = metre^2;
  unit length = metre;
  unit time = second;
  unit per_second = 1 / second; per_second is "Predefined unit time";
end
