// SBML level 2 version 1

model untitled()

  // Compartments:
  compartment default = 1 volume;

  // Species:
  species s1 in default = 0;
  species s2 in default = 0;
  species s3 in default = 0;

  // Reactions:
  re1: s1 + s2 => s3; kass_re1*s1*default*s2*default;
    kass_re1 = 1 per_kmole_per_second;

  // Unit definitions:
  unit substance = 1e-3 mole; substance is "Predefined unit substance";
  unit volume = 1e-3 litre; volume is "Predefined unit volume";
  unit area = metre^2; area is "Predefined unit area";
  unit length = metre; length is "Predefined unit length";
  unit time = second; time is "Predefined unit time";
  unit mmolePerSecond = 1e-3 mole / second;
  unit mM = 1e-3 mole / litre;
  unit mmole_per_second = 1e-3 mole / second;
  unit per_kmole_per_second = 1 / (1000 mole * second);
end
