// SBML level 2 version 4

model untitled()

  // Compartments:
  compartment default = 1 volume;
  compartment cytoplasm in default = 1 volume;
  compartment nucleus in cytoplasm = 1 volume;

  // Species:
  species EGF in cytoplasm = 80;
  species EGFR in cytoplasm = 80;
  species EF_R_cpx in cytoplasm = 0;
  species ATP in cytoplasm = 80;
  species ADP in cytoplasm = 0;
  species EF_R_cpx_p in cytoplasm = 0;
  species PLC in cytoplasm = 10;
  species EF_R_pLC_cpx_p in cytoplasm = 0;
  species EF_R_cpx2_p in cytoplasm = 0;
  species PLC_p in cytoplasm = 0;
  species s20 in cytoplasm = 10; s20 is "PKC";
  species s21 in cytoplasm = 0; s21 is "PKC*";
  species s22 in cytoplasm = 100; s22 is "RAF";
  species s23 in cytoplasm = 0; s23 is "RAF*";
  species MEK in cytoplasm = 120;
  species ERK in cytoplasm = 100;
  species ERKp in cytoplasm = 0;
  species ERKpp in cytoplasm = 0;
  species MEKp in cytoplasm = 0;
  species MEPpp in cytoplasm = 0;
  species RSK in cytoplasm = 50;
  species RSKp in cytoplasm = 0;
  species inhibitor in cytoplasm = 100;
  species RSKpp in cytoplasm = 0;
  species RSKpp_n in nucleus = 0;
  species CREB in nucleus = 100;
  species CREBp in nucleus = 0;

  // Parameters:
  kass_re1 = 0.03 mole;
  kass_re2 = 1;
  kass_re3 = 0.06 mole;
  kass_re4 = 0.3 mole;
  kass_re5 = 0.214 mole;
  kcatp_re6 = 64 mole;
  kM_re6_s22 = 4 mole;
  kcatp_re7 = 3.5 mole;
  kM_re7_s24 = 317 mole;
  kcatp_re8 = 2.9 mole;
  kM_re8_s25 = 317 mole;
  kcatp_re9 = 9.5 mole;
  kM_re9_s27 = 1.46 mole;
  kcatp_re10 = 16 mole;
  kM_re10_s28 = 1.46 mole;
  kcatp_re13 = 0.017 mole;
  kM_re13_s32 = 976 mole;
  kass_re14 = 0.4 mole;
  kcatp_re15 = 104.2 mole;
  kM_re15_s36 = 11.2 mole;
  kcatp_re12 = 1;
  kM_re12_s31 = 1;
  KIa_re12 = 1;
  KIb_re12 = 1;

  // Reactions:
  // mass action rate law for second order irreversible reactions, two reactants, continuous scheme
  re1: EGF + EGFR => EF_R_cpx; kass_re1*EGF*EGFR;
  // mass action rate law for second order irreversible reactions, two reactants, continuous scheme
  re2: EF_R_cpx + ATP => EF_R_cpx_p + ADP; kass_re2*EF_R_cpx*ATP;
  // mass action rate law for second order irreversible reactions, two reactants, continuous scheme
  re3: EF_R_cpx_p + PLC => EF_R_pLC_cpx_p; kass_re3*EF_R_cpx_p*PLC;
  // mass action rate law for first order irreversible reactions, continuous scheme
  re4: EF_R_pLC_cpx_p => EF_R_cpx2_p + PLC_p; kass_re4*EF_R_pLC_cpx_p;
  // mass action rate law for second order irreversible reactions, two reactants, continuous scheme
  re5: PLC_p + s20 => s21; kass_re5*PLC_p*s20;
  // Henri-Michaelis Menten equation
  re6: s22 => s23; s21*(kcatp_re6*s22/(kM_re6_s22 + s22));  // modifiers: s21
  // Henri-Michaelis Menten equation
  re7: MEK => MEKp; s23*(kcatp_re7*MEK/(kM_re7_s24 + MEK));  // modifiers: s23
  // Henri-Michaelis Menten equation
  re8: MEKp => MEPpp; s23*(kcatp_re8*MEKp/(kM_re8_s25 + MEKp));  // modifiers: s23
  // Henri-Michaelis Menten equation
  re9: ERK => ERKp; MEPpp*(kcatp_re9*ERK/(kM_re9_s27 + ERK));  // modifiers: MEPpp
  // Henri-Michaelis Menten equation
  re10: ERKp => ERKpp; MEPpp*(kcatp_re10*ERKp/(kM_re10_s28 + ERKp));  // modifiers: MEPpp
  // mass action rate law for first order irreversible reactions, continuous scheme
  re12: RSK => RSKp; ERKpp*(kcatp_re12*RSK/(kM_re12_s31 + kM_re12_s31/KIa_re12*inhibitor + RSK + kM_re12_s31/KIb_re12*inhibitor));  // modifiers: inhibitor, ERKpp
  // Henri-Michaelis Menten equation
  re13: RSKp => RSKpp; ERKpp*(kcatp_re13*RSKp/(kM_re13_s32 + RSKp));  // modifiers: ERKpp
  // mass action rate law for first order irreversible reactions, continuous scheme
  re14: RSKpp => RSKpp_n; kass_re14*RSKpp;
  // Henri-Michaelis Menten equation
  re15: CREB => CREBp; RSKpp_n*(kcatp_re15*CREB/(kM_re15_s36 + CREB));  // modifiers: RSKpp_n

  // Unit definitions:
  unit substance = mole;
  unit volume = litre;
  unit area = metre^2;
  unit length = metre;
  unit time = second;
end
