// SBML level 2 version 4

model TCellSignaltransductionMin200807()

  // Compartments:
  compartment default = 1 volume;
  compartment c1 in default = 1 volume;
  compartment c2 in c1 = 1 volume;
  compartment c3 in c1 = 1 volume;

  // Species:
  species CD3 in c1 = 3/c1;
  species AntiCD3 in default = 0.0064/default;
  species CD3_AntiCD3 in c1 = 0; CD3_AntiCD3 is "CD3-AntiCD3";
  species Lck in c1 = 3/c1;
  species CD3_AntiCD3_P in c1 = 0; CD3_AntiCD3_P is "CD3-AntiCD3-P";
  species CD3_AntiCD3_P_Zap70 in c1 = 0; CD3_AntiCD3_P_Zap70 is "CD3-AntiCD3-P-Zap70";
  species CD3_AntiCD3_P_Zap70_P in c1 = 0; CD3_AntiCD3_P_Zap70_P is "CD3-AntiCD3-P-Zap70-P";
  species Zap70 in c1 = 120/c1;
  species LAT in c1 = 15/c1;
  species LAT_P in c1 = 0; LAT_P is "LAT-P";
  species LAT_P_PLCy in c1 = 0; LAT_P_PLCy is "LAT-P-PLCy";
  species LAT_P_PLCy_Vav in c1 = 0; LAT_P_PLCy_Vav is "LAT-P-PLCy-Vav";
  species LAT_P_LPLCy_P_Vav_P in c1 = 0; LAT_P_LPLCy_P_Vav_P is "LAT-P-LPLCy-P-Vav-P";
  species PLCy in c1 = 8.82/c1;
  species Vav in c1 = 15/c1;
  species PIP2 in c1 = 18.3/c1;
  species PIP3 in c1 = 0;
  species IP3 in c1 = 0;
  species PIP3_ITK in c1 = 0; PIP3_ITK is "PIP3-ITK";
  species PIP3_Akt in c1 = 0; PIP3_Akt is "PIP3-Akt";
  species ITK in c1 = 10/c1;
  species AKT in c1 = 17/c1;
  species CD28_AntiCD28_P in c1 = 0; CD28_AntiCD28_P is "CD28-AntiCD28-P";
  species CD28_AntiCD28_P_PI3K in c1 = 0; CD28_AntiCD28_P_PI3K is "CD28-AntiCD28-P-PI3K";
  species CD28_AntiCD28 in c1 = 0; CD28_AntiCD28 is "CD28-AntiCD28";
  species CD28 in c1 = 10/c1;
  species AntiCD28 in default = 0.0064/default;
  species PI3K in c1 = 3/c1;
  species Ca2_int in c2 = 20/c2; Ca2_int is "Ca2+int";
  species Ca2_ext in c1 = 0; Ca2_ext is "Ca2+ext";
  species Calmodulin in c1 = 5/c1;
  species Calcineurin in c1 = 3/c1;
  species Calmodulin_2Ca in c1 = 0; Calmodulin_2Ca is "Calmodulin-2Ca";
  species Calmodulin_2Ca_Calcineurin in c1 = 0; Calmodulin_2Ca_Calcineurin is "Calmodulin-2Ca-Calcineurin";
  species GSK3 in c1 = 3/c1;
  species GSK3_P in c1 = 1/c1; GSK3_P is "GSK3-P";
  species GSK3_Dephosph in c1 = 10/c1; GSK3_Dephosph is "GSK3-Dephosph";
  species NFAT in c3 = 1.725/c3;
  species NFAT_P in c1 = 2/c1; NFAT_P is "NFAT-P";
  species csa13_degraded in c1 = 0;
  species csa12_degraded in c1 = 0;
  species csa2_degraded in c1 = 0;
  species csa3_degraded in c1 = 0;

  // Parameters:
  k1ass = 1;
  k3cat = 1;
  k3m = 1;
  k4ass = 1;
  k5cat = 1;
  k5m = 1;
  k6ass = 1;
  k7ass = 1;
  k8cata = 1;
  k8catb = 1;
  k8ma = 1;
  k8mb = 1;
  k9cat = 1;
  k9m = 1;
  k13ass = 1;
  k14ass = 1;
  k15ass = 1;
  k16cat = 1;
  k16m = 1;
  k17ass = 1;
  k18cat = 1;
  k18m = 1;
  k19cat = 1;
  k19m = 1;
  k20ass = 1;
  k22ass = 1;
  k23cat = 0.1;
  k23m = 1;
  k24cat = 1;
  k24m = 1;
  k25cat = 1;
  k25m = 1;
  k26cat = 0.1;
  k26m = 1;
  k27int = 1;
  k28int = 1;
  k29int = 1;
  k30int = 1;
  kG_s3 = 1 DIMENSIONLESS; kG_s3 is "Energy constant of species s3";
  kG_s5 = 1 DIMENSIONLESS; kG_s5 is "Energy constant of species s5";

  // Reactions:
  re1: AntiCD3 + CD3 -> CD3_AntiCD3; k1ass*AntiCD3*CD3;
  re2: CD3_AntiCD3 -> CD3_AntiCD3_P; Lck*c1*kcrg_re2_s4*((CD3_AntiCD3*c1/kmc_re2_s3_s4*sqrt(kG_s3*kmc_re2_s3_s4/(kG_s5*kmc_re2_s5_s4)) - CD3_AntiCD3_P*c1/kmc_re2_s5_s4*sqrt(kG_s5*kmc_re2_s5_s4/(kG_s3*kmc_re2_s3_s4)))/(1 + CD3_AntiCD3*c1/kmc_re2_s3_s4 + CD3_AntiCD3_P*c1/kmc_re2_s5_s4));  // modifiers: Lck
    kmc_re2_s3_s4 = 1 substance; kmc_re2_s5_s4 = 1 substance; kcrg_re2_s4 = 1 per_second;

  // Unit definitions:
  unit substance = 1e-3 mole;
  unit volume = 1e-3 litre;
  unit area = metre^2;
  unit length = metre;
  unit time = second;
  unit per_second = 1 / second; per_second is "Predefined unit time";
end
