// SBML level 2 version 3

function kl_0(Vf, P, Kms, Vr, Kmp, S)
  (Vf*S/Kms - Vr*P/Kmp)/(1 + S/Kms + P/Kmp);
end

function kl_1(S, Vr, P, Vf, Kmp, Kms)
  (Vf*S/Kms - Vr*P/Kmp)/(1 + S/Kms + P/Kmp);
end

function kl_2(Kmp, Vr, P, S, Kms, Vf)
  (Vf*S/Kms - Vr*P/Kmp)/(1 + S/Kms + P/Kmp);
end

function kl_3(Vr, Vf, Kms, Kmp, P, S)
  (Vf*S/Kms - Vr*P/Kmp)/(1 + S/Kms + P/Kmp);
end

function kl_4(Vf, S, P, Kms, Kmp, Vr)
  (Vf*S/Kms - Vr*P/Kmp)/(1 + S/Kms + P/Kmp);
end

function kl_5(Km, S, V)
  V*S/(Km + S);
end

function kl_6(V, Km, S)
  V*S/(Km + S);
end

function kl_7(Km, V, S)
  V*S/(Km + S);
end

function kl_8(Km, S, V)
  V*S/(Km + S);
end

function kl_9(S, Kms, Kmp, P, Vf, Vr)
  (Vf*S/Kms - Vr*P/Kmp)/(1 + S/Kms + P/Kmp);
end

model Glycolysis_ICSB_Tutorial()
  // This model has been created with the help of the SABIO-RK Database (http://sabio.villa-bosch.de/SABIORK)

  // Compartments:
  compartment compart_1 = 1; compart_1 is "Cell";

  // Species:
  species spc_1 in compart_1; spc_1 is "alpha-D-Glucose";
  species spc_2 in compart_1; spc_2 is "ATP";
  species spc_3 in compart_1; spc_3 is "alpha-D-Glucose 6-phosphate";
  species spc_4 in compart_1; spc_4 is "ADP";
  species enz_1 in compart_1; enz_1 is "Hexokinase(Enzyme)";
  species spc_5 in compart_1; spc_5 is "Phosphoenolpyruvate";
  species spc_6 in compart_1; spc_6 is "Pyruvate";
  species enz_2 in compart_1; enz_2 is "Pyruvate kinase(Enzyme)";
  species spc_7 in compart_1; spc_7 is "2-Phospho-D-glycerate";
  species spc_8 in compart_1; spc_8 is "H2O";
  species enz_3 in compart_1; enz_3 is "Phosphopyruvate hydratase(Enzyme)";
  species spc_9 in compart_1; spc_9 is "Glycerate 3-phosphate";
  species enz_4 in compart_1; enz_4 is "Phosphoglycerate mutase(Enzyme)";
  species spc_10 in compart_1; spc_10 is "Glycerate 1,3-bisphosphate";
  species enz_5 in compart_1; enz_5 is "Phosphoglycerate kinase(Enzyme)";
  species spc_11 in compart_1; spc_11 is "NAD+";
  species spc_12 in compart_1; spc_12 is "D-Glyceraldehyde 3-phosphate";
  species spc_13 in compart_1; spc_13 is "Phosphate";
  species spc_14 in compart_1; spc_14 is "H+";
  species spc_15 in compart_1; spc_15 is "NADH";
  species enz_6 in compart_1; enz_6 is "Glyceraldehyde-3-phosphate dehydrogenase(Enzyme)";
  species spc_16 in compart_1; spc_16 is "Glycerone phosphate";
  species enz_7 in compart_1; enz_7 is "Triose-phosphate isomerase(Enzyme)";
  species spc_17 in compart_1; spc_17 is "beta-D-Fructose 1,6-bisphosphate";
  species enz_8 in compart_1; enz_8 is "Fructose-bisphosphate aldolase(Enzyme)";
  species spc_18 in compart_1; spc_18 is "beta-D-Fructose 6-phosphate";
  species enz_9 in compart_1; enz_9 is "6-Phosphofructokinase(Enzyme)";
  species enz_10 in compart_1; enz_10 is "Glucose-6-phosphate isomerase(Enzyme)";

  // Reactions:
  reac_0: spc_1 + spc_2 -> spc_3 + spc_4; kl_0(reac_0_Vf, spc_3, Kms_spc_1, reac_0_Vr, Kmp_spc_3, spc_1);  // modifiers: enz_1
    reac_0_Vf = 33 mMdivmin; Kms_spc_1 = 0.072 mM; reac_0_Vr = 0.00637 mMdivmin; Kmp_spc_3 = 0.042 mM;
  reac_1: spc_5 + spc_4 -> spc_6 + spc_2; kl_1(spc_5, reac_1_Vr, spc_6, reac_1_Vf, Kmp_spc_6, Kms_spc_5);  // modifiers: enz_2
    reac_1_Vr = 0.63 mMdivmin; reac_1_Vf = 566 mMdivmin; Kmp_spc_6 = 10 mM; Kms_spc_5 = 0.11 mM;
  reac_2: spc_7 -> spc_5 + spc_8; kl_2(Kmp_spc_5, reac_2_Vr, spc_5, spc_7, Kms_spc_7, reac_2_Vf);  // modifiers: enz_3
    Kmp_spc_5 = 0.089 mM; reac_2_Vr = 120 mMdivmin; Kms_spc_7 = 0.045 mM; reac_2_Vf = 111 mMdivmin;
  reac_3: spc_9 -> spc_7; kl_3(reac_3_Vr, reac_3_Vf, Kms_spc_9, Kmp_spc_7, spc_7, spc_9);  // modifiers: enz_4
    reac_3_Vr = 2880 mMdivmin; reac_3_Vf = 674 mMdivmin; Kms_spc_9 = 0.145 mM; Kmp_spc_7 = 0.139 mM;
  reac_4: spc_10 + spc_4 -> spc_9 + spc_2; kl_4(reac_4_Vf, spc_10, spc_9, Kms_spc_10, Kmp_spc_9, reac_4_Vr);  // modifiers: enz_5
    reac_4_Vf = 15060 mMdivmin; Kms_spc_10 = 0.021 mM; Kmp_spc_9 = 0.51 mM; reac_4_Vr = 959 mMdivmin;
  reac_5: spc_11 + spc_12 + spc_13 -> spc_10 + spc_14 + spc_15; kl_5(Km_spc_12, spc_12, reac_5_V);  // modifiers: enz_6
    Km_spc_12 = 0.042 mM; reac_5_V = 321 mMdivmin;
  reac_6: spc_16 -> spc_12; kl_6(reac_6_V, Km_spc_16, spc_16);  // modifiers: enz_7
    reac_6_V = 356 mMdivmin; Km_spc_16 = 1.53 mM;
  reac_7: spc_17 -> spc_16 + spc_12; kl_7(Km_spc_17, reac_7_V, spc_17);  // modifiers: enz_8
    Km_spc_17 = 0.038 mM; reac_7_V = 59.5 mMdivmin;
  reac_8: spc_2 + spc_18 -> spc_17 + spc_4; kl_8(Km_spc_18, spc_18, reac_8_V);  // modifiers: enz_9
    Km_spc_18 = 0.224 mM; reac_8_V = 79.7 mMdivmin;
  reac_9: spc_3 -> spc_18; kl_9(spc_3, Kms_spc_3, Kmp_spc_18, spc_18, reac_9_Vf, reac_9_Vr);  // modifiers: enz_10
    Kms_spc_3 = 0.425 mM; Kmp_spc_18 = 0.175 mM; reac_9_Vf = 604 mMdivmin; reac_9_Vr = 576 mMdivmin;

  // Unit definitions:
  unit mMdivmin = 1e-3 mole / (litre * 60 second);
  unit mM = 1e-3 mole / litre;
end
