// SBML level 2 version 2

model Xu2003_Phosphoinositide_turnover()
  // The model reproduces the percentage change of PIP_PM, PIP2_PM and IP3_Cyt as depicted in Figure 1 of the paper. The model also contains the equations for the analysis of PH-GFP experiments, however the initial value of PH_GFP has been set to zero to more accurately reproduce Figure 1. For the analysis of PH_GFP experiments, one should plug in the values of PH_GFP, IP3_PHGFP and PIP2_PHGFP from Table AI in the appendix. The "stochiometry" field has been used to convert fluxes from membrane species to volume species. The value of 0.0009224 is a product of (Surface to Volume_PM/(1-VolFractionNucleus)) *(1/Avagadro's number)*1E21. 0.5 is the surface to volume ratio of the plasma membrane, 0.1 is the Volume fraction of the nucleus, 1E21 is required for a unit surface to volume ratio and the Avagadro's number is present in the denominator to convert molecules to moles. The model was successfully tested on MathSBML.
  // This model originates from BioModels Database: A Database of Annotated Published Models. It is copyright (c) 2005-2008 The BioModels Team.
  // For more information see the terms of use.
  // biomodels.db:BIOMD0000000075
  // isDescribedBy pubmed:12771127
  // isVersionOf GO:0046488
  // isPartOf kegg.pathway:map04070

  // Compartments:
  compartment PM = 1 area;  // 2-D; GO:0005886
  compartment Cytosol in PM = 1 volume;  // GO:0005737

  // Species:
  species PIP2_PHGFP_PM in PM = 1;  // substance in molecules; hasPart CHEBI:18348 kegg.compound:C04637
  species PH_GFP_Cyt in Cytosol = 1;  // substance in micromole
  species PI_PM in PM = 142857;  // substance in molecules; CHEBI:16749 kegg.compound:C01194
  species IP3_PHGFP_Cyt in Cytosol = 1;  // substance in micromole; hasPart CHEBI:16595 kegg.compound:C01245
  species PIP2_PM in PM = 4000;  // substance in molecules; CHEBI:18348 kegg.compound:C04637
  species PIP_PM in PM = 2857;  // substance in molecules; CHEBI:17526 kegg.compound:C01277
  species DAG_PM in PM = 2000;  // substance in molecules; CHEBI:18035 kegg.compound:C00165
  species $hv_Cytosol in Cytosol = 1;
  species $IP3X_Cytosol in Cytosol = 1;  // substance in micromole; hasPart CHEBI:16595 kegg.compound:C01245
  species PLC_PM in PM = 100;  // substance in molecules
  species PLC_act_PM in PM = 1;  // substance in molecules
  species IP3_Cyt in Cytosol = 0.16;  // substance in micromole; CHEBI:16595 kegg.compound:C01245

  // Parameters:
  PIP_basal = 2857 molecules_um_2;
  PIP2_basal = 4000 molecules_um_2;
  PIPsynstim_Stimulation = 0 dimensionless;
  PIPsynbasal_Stimulation = 0 dimensionless;
  PIP2synstim_Stimulation = 0 dimensionless;
  PIP2synbasal_Stimulation = 0 dimensionless;
  kBasalSynPIP = 0.0055 s_1;
  kStimSynPIP = 0.019 s_1;
  tauPIPsyn = 0.05 second;
  PIPsyndecay = 1 second;
  tau0 = 0.05 second;
  stimdecay = 1 second;
  kf_PIP2PH = 0.12 uM_1_s_1; kf_PIP2PH is "KdPIP2PH";
  KdPIP2PH = 2 uM;
  kBasalSynPIP2 = 0.048 s_1;
  kStimSynPIP2 = 0.92 s_1;
  tauPIP2syn = 0.05 second;
  PIP2syndecay = 1 second;
  kf_IP3PH = 10 uM_1_s_1;
  KdIP3PH = 0.1 uM;
  Signal_Stimulation = 0 dimensionless;
  kdiss_IP3deg = 1;
  kass_IP3deg = 1;
  kM_PIP2_hyd_IP3_Cyt = 1;
  kM_PIP2_hyd_DAG_PM = 1;
  Vn_PIP2_hyd = 1;
  kM_PIP2_hyd_PIP2_PM = 1;
  Vp_PIP2_hyd = 1;
  kM_IP3_uncaging_IP3_Cyt = 1;
  Vn_IP3_uncaging = 1;
  kM_IP3_uncaging_IP3X_Cytosol = 1;
  Vp_IP3_uncaging = 1;
  kM_PLCact_PLC_act_PM = 1;
  Vn_PLCact = 1;
  kM_PLCact_PLC_PM = 1;
  Vp_PLCact = 1;
  kM_PIP2_PH_hyd_DAG_PM = 1;
  kM_PIP2_PH_hyd_IP3_Cyt = 1;
  kM_PIP2_PH_hyd_PH_GFP_Cyt = 1;
  Vn_PIP2_PH_hyd = 1;
  kM_PIP2_PH_hyd_PIP2_PHGFP_PM = 1;
  Vp_PIP2_PH_hyd = 1;
  ki_PIP2_PH_PIP2_PM = 1;
  kM_PIP2_PH_PIP2_PM = 1;
  Vn_PIP2_PH = 1;
  Vp_PIP2_PH = 1;
  kM_PIP2Syn_PIP2_PM = 1;
  Vn_PIP2Syn = 1;
  kM_PIP2Syn_PIP_PM = 1;
  Vp_PIP2Syn = 1;
  ki_IP3_PHGFP_PH_GFP_Cyt = 1;
  kM_IP3_PHGFP_PH_GFP_Cyt = 1;
  Vn_IP3_PHGFP = 1;
  Vp_IP3_PHGFP = 1;
  kdiss_PIPSyn = 1;
  kass_PIPSyn = 1;

  // Assignment rules:
  Ratebasal_PIPsyn := 0.581*PIPsynbasal_Stimulation*kBasalSynPIP*(-1 + exp((PIP_basal + (-PIP_PM))*(1/PIP_basal)));
  Ratestim_PIPsyn := kStimSynPIP*exp(-((time + (-tauPIPsyn))*(1/PIPsyndecay)))*PIPsynstim_Stimulation;
  signal := Signal_Stimulation*exp(-((time + (-tau0))*(1/stimdecay)));
  kr_PIP2PH := kf_PIP2PH*KdPIP2PH;
  Rate_PIP2Synbasal := 0.581*PIP2synbasal_Stimulation*kBasalSynPIP2*(-1 + exp((PIP2_basal + (-PIP2_PM))*(1/PIP2_basal)));
  Rate_PIP2SynStim := kStimSynPIP2*exp(-((time + (-tauPIP2syn))*(1/PIP2syndecay)))*PIP2synstim_Stimulation;
  kr_IP3PH := kf_IP3PH*KdIP3PH;

  // Reactions:
  PIPSyn: PI_PM -> PIP_PM; (vmax_fwd_PIPSyn/kM_PIPSyn_PI_PM*PI_PM*PM - vmax_bwd_PIPSyn/kM_PIPSyn_PIP_PM*PIP_PM*PM)/(1 + PI_PM*PM/kM_PIPSyn_PI_PM + PIP_PM*PM/kM_PIPSyn_PIP_PM);  // isVersionOf ec-code:2.7.1.67 GO:0004430; kegg.reaction:R03361
    vmax_fwd_PIPSyn = 1 mmolePerSecond; kM_PIPSyn_PI_PM = 1 substance; vmax_bwd_PIPSyn = 1 mmolePerSecond; kM_PIPSyn_PIP_PM = 1 substance;
  PIP2_hyd: PIP2_PM -> DAG_PM + 0.0009224 IP3_Cyt; (vmax_fwd_PIP2_hyd*(PIP2_PM*PM/PIP2_hyd_kM_PIP2_hyd_PIP2_PM) - vmax_bwd_PIP2_hyd*(DAG_PM*PM/PIP2_hyd_kM_PIP2_hyd_DAG_PM)*(IP3_Cyt*Cytosol/PIP2_hyd_kM_PIP2_hyd_IP3_Cyt)^0.0009224)/(PIP2_PM*PM/PIP2_hyd_kM_PIP2_hyd_PIP2_PM + 1 + DAG_PM*PM/PIP2_hyd_kM_PIP2_hyd_DAG_PM);  // modifiers: PLC_act_PM; isVersionOf ec-code:3.1.4.11 GO:0004435; kegg.reaction:R03435
    vmax_fwd_PIP2_hyd = 1 mmolePerSecond; PIP2_hyd_kM_PIP2_hyd_PIP2_PM = 1 substance; vmax_bwd_PIP2_hyd = 1 mmolePerSecond; PIP2_hyd_kM_PIP2_hyd_DAG_PM = 1 substance; PIP2_hyd_kM_PIP2_hyd_IP3_Cyt = 1 substance;
  IP3_uncaging: $IP3X_Cytosol -> IP3_Cyt; (vmax_fwd_IP3_uncaging/IP3_uncaging_kM_IP3_uncaging_IP3X_Cytosol*IP3X_Cytosol*Cytosol - vmax_bwd_IP3_uncaging/IP3_uncaging_kM_IP3_uncaging_IP3_Cyt*IP3_Cyt*Cytosol)/(1 + IP3X_Cytosol*Cytosol/IP3_uncaging_kM_IP3_uncaging_IP3X_Cytosol + IP3_Cyt*Cytosol/IP3_uncaging_kM_IP3_uncaging_IP3_Cyt);  // modifiers: hv_Cytosol
    vmax_fwd_IP3_uncaging = 1 mmolePerSecond; IP3_uncaging_kM_IP3_uncaging_IP3X_Cytosol = 1 substance; vmax_bwd_IP3_uncaging = 1 mmolePerSecond; IP3_uncaging_kM_IP3_uncaging_IP3_Cyt = 1 substance;
  PLCact: PLC_PM -> PLC_act_PM; (vmax_fwd_PLCact/PLCact_kM_PLCact_PLC_PM*PLC_PM*PM - vmax_bwd_PLCact/PLCact_kM_PLCact_PLC_act_PM*PLC_act_PM*PM)/(1 + PLC_PM*PM/PLCact_kM_PLCact_PLC_PM + PLC_act_PM*PM/PLCact_kM_PLCact_PLC_act_PM);  // isVersionOf GO:0007202
    vmax_fwd_PLCact = 1 mmolePerSecond; PLCact_kM_PLCact_PLC_PM = 1 substance; vmax_bwd_PLCact = 1 mmolePerSecond; PLCact_kM_PLCact_PLC_act_PM = 1 substance;
  PIP2_PH_hyd: PIP2_PHGFP_PM -> 0.0009224 PH_GFP_Cyt + 0.0009224 IP3_Cyt + DAG_PM; (vmax_fwd_PIP2_PH_hyd*(PIP2_PHGFP_PM*PM/PIP2_PH_hyd_kM_PIP2_PH_hyd_PIP2_PHGFP_PM) - vmax_bwd_PIP2_PH_hyd*(PH_GFP_Cyt*Cytosol/PIP2_PH_hyd_kM_PIP2_PH_hyd_PH_GFP_Cyt)^0.0009224*(IP3_Cyt*Cytosol/PIP2_PH_hyd_kM_PIP2_PH_hyd_IP3_Cyt)^0.0009224*(DAG_PM*PM/PIP2_PH_hyd_kM_PIP2_PH_hyd_DAG_PM))/(PIP2_PHGFP_PM*PM/PIP2_PH_hyd_kM_PIP2_PH_hyd_PIP2_PHGFP_PM + 1 + DAG_PM*PM/PIP2_PH_hyd_kM_PIP2_PH_hyd_DAG_PM);  // modifiers: PLC_act_PM; isVersionOf ec-code:3.1.4.11 kegg.reaction:R03435
    vmax_fwd_PIP2_PH_hyd = 1 mmolePerSecond; PIP2_PH_hyd_kM_PIP2_PH_hyd_PIP2_PHGFP_PM = 1 substance; vmax_bwd_PIP2_PH_hyd = 1 mmolePerSecond; PIP2_PH_hyd_kM_PIP2_PH_hyd_PH_GFP_Cyt = 1 substance; PIP2_PH_hyd_kM_PIP2_PH_hyd_IP3_Cyt = 1 substance; PIP2_PH_hyd_kM_PIP2_PH_hyd_DAG_PM = 1 substance;
  PIP2_PH: PH_GFP_Cyt + PIP2_PM -> PIP2_PHGFP_PM; (vmax_fwd_PIP2_PH/(ki_PIP2_PH_PH_GFP_Cyt*PIP2_PH_kM_PIP2_PH_PIP2_PM)*(PH_GFP_Cyt*Cytosol*PIP2_PM*PM/(ki_PIP2_PH_PH_GFP_Cyt*PIP2_PH_kM_PIP2_PH_PIP2_PM)) - vmax_bwd_PIP2_PH/kM_PIP2_PH_PIP2_PHGFP_PM*PIP2_PHGFP_PM*PM)/(1 + PIP2_PHGFP_PM*PM/kM_PIP2_PH_PIP2_PHGFP_PM);  // isVersionOf GO:0005488
    vmax_fwd_PIP2_PH = 1 mmolePerSecond; vmax_bwd_PIP2_PH = 1 mmolePerSecond; PIP2_PH_kM_PIP2_PH_PIP2_PM = 1 substance; kM_PIP2_PH_PIP2_PHGFP_PM = 1 substance; ki_PIP2_PH_PH_GFP_Cyt = 1; PIP2_PH_ki_PIP2_PH_PIP2_PM = 1;
  IP3deg: IP3_Cyt -> ; IP3deg_kass_IP3deg - IP3deg_kdiss_IP3deg;  // isVersionOf GO:0030163
    IP3deg_kass_IP3deg = 1; IP3deg_kdiss_IP3deg = 1;
  PIP2Syn: PIP_PM -> PIP2_PM; (vmax_fwd_PIP2Syn/PIP2Syn_kM_PIP2Syn_PIP_PM*PIP_PM*PM - vmax_bwd_PIP2Syn/PIP2Syn_kM_PIP2Syn_PIP2_PM*PIP2_PM*PM)/(1 + PIP_PM*PM/PIP2Syn_kM_PIP2Syn_PIP_PM + PIP2_PM*PM/PIP2Syn_kM_PIP2Syn_PIP2_PM);  // kegg.reaction:R03469; isVersionOf ec-code:2.7.1.68 GO:0016308
    vmax_fwd_PIP2Syn = 1 mmolePerSecond; PIP2Syn_kM_PIP2Syn_PIP_PM = 1 substance; vmax_bwd_PIP2Syn = 1 mmolePerSecond; PIP2Syn_kM_PIP2Syn_PIP2_PM = 1 substance;
  IP3_PHGFP: IP3_Cyt + PH_GFP_Cyt -> IP3_PHGFP_Cyt; (vmax_fwd_IP3_PHGFP/(ki_IP3_PHGFP_IP3_Cyt*IP3_PHGFP_kM_IP3_PHGFP_PH_GFP_Cyt)*(IP3_Cyt*Cytosol*PH_GFP_Cyt*Cytosol/(ki_IP3_PHGFP_IP3_Cyt*IP3_PHGFP_kM_IP3_PHGFP_PH_GFP_Cyt)) - vmax_bwd_IP3_PHGFP/kM_IP3_PHGFP_IP3_PHGFP_Cyt*IP3_PHGFP_Cyt*Cytosol)/(1 + IP3_PHGFP_Cyt*Cytosol/kM_IP3_PHGFP_IP3_PHGFP_Cyt);  // isVersionOf GO:0005488
    vmax_fwd_IP3_PHGFP = 1 mmolePerSecond; vmax_bwd_IP3_PHGFP = 1 mmolePerSecond; IP3_PHGFP_kM_IP3_PHGFP_PH_GFP_Cyt = 1 substance; kM_IP3_PHGFP_IP3_PHGFP_Cyt = 1 substance; ki_IP3_PHGFP_IP3_Cyt = 1; IP3_PHGFP_ki_IP3_PHGFP_PH_GFP_Cyt = 1;

  // Events:
  // Stimulating Ratebasal_PIPsyn when PIP_PM is less than PIP_basal
  event_0000001: at (PIP_PM < PIP_basal): PIPsynbasal_Stimulation = 1;
  // Stimulating Ratestim_PIPsyn when time is greater than tauPIPsyn
  event_0000002: at (time > tauPIPsyn): PIPsynstim_Stimulation = 1;
  // Stimulating Rate_PIP2Synbasal when PIP2_PM becomes less than PIP2_basal
  event_0000003: at (PIP2_PM < PIP2_basal): PIP2synbasal_Stimulation = 1;
  // Stimulating Rate_PIP2SynStim when time is greater than tauPIP2syn
  event_0000004: at (time > tauPIP2syn): PIP2synstim_Stimulation = 1;
  // Triggering the "Signal" for PLC_PM activation when time is greater than tau0
  event_0000005: at (time > tau0): Signal_Stimulation = 1;

  // Unit definitions:
  unit micromole = 1e-6 mole;
  unit molecules = item;
  unit um2 = (1e-6 metre)^2;
  unit molecules_um_2_s_1 = item / ((1e-6 metre)^2 * second);
  unit s_1 = 1 / second;
  unit molecules_um_2 = item / (1e-6 metre)^2;
  unit um2_molecules_1_s_1 = (1e-6 metre)^2 / (item * second);
  unit uM_1_s_1 = litre / (1e-6 mole * second);
  unit uM = 1e-6 mole / litre;
  unit mmolePerSecond = 1e-3 mole / second;
end
