// SBML level 2 version 1

model Src_MitoticActivation()
  // Fuss2006_MitoticActivation
  // The model was curated with XPP. The figure 3 was successfully reproduced.
  // This model originates from BioModels Database: A Database of Annotated Published Models. It is copyright (c) 2005-2009 The BioModels Team.
  // For more information see the terms of use.
  // To cite BioModels Database, please use Le Novère N., Bornstein B., Broicher A., Courtot M., Donizelli M., Dharuri H., Li L., Sauro H., Schilstra M., Shapiro B., Snoep J.L., Hucka M. (2006) BioModels Database: A Free, Centralized Database of Curated, Published, Quantitative Kinetic Models of Biochemical and Cellular Systems Nucleic Acids Res., 34: D689-D691.
  // biomodels.db:BIOMD0000000069
  // isDescribedBy pubmed:16873466
  // taxonomy:9606
  // isVersionOf reactome:REACT_152 GO:0000278

  // Compartments:
  compartment default = 1;  // GO:0005623

  // Species:
  species srci in default = NaN/default;  // isVersionOf uniprot:P12931
  species srco in default = NaN/default;  // isVersionOf uniprot:P12931
  species srca in default = NaN/default;  // isVersionOf uniprot:P12931
  species srcc in default = NaN/default;  // isVersionOf uniprot:P12931
  species Cbp_P_CSK in default = NaN/default;  // hasPart uniprot:P41240 uniprot:Q9NWQ8
  species CSK_cytoplasm in default = NaN/default;  // uniprot:P41240
  species PTP in default = NaN/default;  // isVersionOf uniprot:P18433
  species PTP_pY789 in default = NaN/default;  // isVersionOf uniprot:P18433
  species Cbp in default = NaN/default;  // isVersionOf uniprot:Q9NWQ8
  species Cbp_P in default = NaN/default;  // isVersionOf uniprot:Q9NWQ8

  // Parameters:
  src_background = 0.0001;
  PTP_background = 0;
  rho_srca = 1;
  rho_srco = 0;
  rho_srcc = 1;
  Kser = 1;
  kG_srci = 1;
  kG_srco = 1;
  kG_srca = 1;
  kG_srcc = 1;
  kG_CSK_cytoplasm = 1;
  kG_Cbp_P = 1;
  kG_Cbp_P_CSK = 1;
  kG_PTP = 1;
  kG_PTP_pY789 = 1;
  kG_Cbp = 1;

  // Assignment rules:
  src_activity := rho_srco*srco + rho_srca*srca + src_background + rho_srcc*srcc;
  ptp_activity := PTP_background + Kser*PTP_pY789;

  // Reactions:
  // reversible thermodynamically independent convenience kinetics
  v1: srci -> srco; kV_v1*((srci/kM_v1_srci*sqrt(kG_srci*kM_v1_srci/(kG_srco*kM_v1_srco)) - srco/kM_v1_srco*sqrt(kG_srco*kM_v1_srco/(kG_srci*kM_v1_srci)))/(1 + srci/kM_v1_srci + srco/kM_v1_srco));  // modifiers: Cbp_P_CSK; isVersionOf ec-code:2.7.10.2 GO:0004713
    kM_v1_srci = 1; kM_v1_srco = 1; kV_v1 = 1;
  // reversible thermodynamically independent convenience kinetics
  v2: srco -> srca; kV_v2*((srco/kM_v2_srco*sqrt(kG_srco*kM_v2_srco/(kG_srca*kM_v2_srca)) - srca/kM_v2_srca*sqrt(kG_srca*kM_v2_srca/(kG_srco*kM_v2_srco)))/(1 + srco/kM_v2_srco + srca/kM_v2_srca));  // isVersionOf ec-code:2.7.10.2 GO:0004713
    kM_v2_srco = 1; kM_v2_srca = 1; kV_v2 = 1;
  // reversible thermodynamically independent convenience kinetics
  v3: srca -> srcc; kV_v3*((srca/kM_v3_srca*sqrt(kG_srca*kM_v3_srca/(kG_srcc*kM_v3_srcc)) - srcc/kM_v3_srcc*sqrt(kG_srcc*kM_v3_srcc/(kG_srca*kM_v3_srca)))/(1 + srca/kM_v3_srca + srcc/kM_v3_srcc));  // modifiers: Cbp_P_CSK; isVersionOf ec-code:2.7.10.2 GO:0004713
    kM_v3_srca = 1; kM_v3_srcc = 1; kV_v3 = 1;
  // reversible thermodynamically independent convenience kinetics
  v4: srcc -> srci; kV_v4*((srcc/kM_v4_srcc*sqrt(kG_srcc*kM_v4_srcc/(kG_srci*kM_v4_srci)) - srci/kM_v4_srci*sqrt(kG_srci*kM_v4_srci/(kG_srcc*kM_v4_srcc)))/(1 + srcc/kM_v4_srcc + srci/kM_v4_srci));  // isVersionOf ec-code:3.1.3.48 GO:0004725
    kM_v4_srcc = 1; kM_v4_srci = 1; kV_v4 = 1;
  // reversible thermodynamically independent convenience kinetics
  CSK_translocation: CSK_cytoplasm + Cbp_P -> Cbp_P_CSK; kV_CSK_translocation*((CSK_cytoplasm/kM_CSK_translocation_CSK_cytoplasm*(Cbp_P/kM_CSK_translocation_Cbp_P)*sqrt(kG_CSK_cytoplasm*kM_CSK_translocation_CSK_cytoplasm*kG_Cbp_P*kM_CSK_translocation_Cbp_P/(kG_Cbp_P_CSK*kM_CSK_translocation_Cbp_P_CSK)) - Cbp_P_CSK/kM_CSK_translocation_Cbp_P_CSK*sqrt(kG_Cbp_P_CSK*kM_CSK_translocation_Cbp_P_CSK/(kG_CSK_cytoplasm*kM_CSK_translocation_CSK_cytoplasm*kG_Cbp_P*kM_CSK_translocation_Cbp_P)))/((1 + CSK_cytoplasm/kM_CSK_translocation_CSK_cytoplasm)*(1 + Cbp_P/kM_CSK_translocation_Cbp_P) + Cbp_P_CSK/kM_CSK_translocation_Cbp_P_CSK));  // hasPart GO:0006461 GO:0006612
    kM_CSK_translocation_CSK_cytoplasm = 1; kM_CSK_translocation_Cbp_P = 1; kM_CSK_translocation_Cbp_P_CSK = 1; kV_CSK_translocation = 1;
  // reversible thermodynamically independent convenience kinetics
  PTP_phosphorylation: PTP -> PTP_pY789; kV_PTP_phosphorylation*((PTP/kM_PTP_phosphorylation_PTP*sqrt(kG_PTP*kM_PTP_phosphorylation_PTP/(kG_PTP_pY789*kM_PTP_phosphorylation_PTP_pY789)) - PTP_pY789/kM_PTP_phosphorylation_PTP_pY789*sqrt(kG_PTP_pY789*kM_PTP_phosphorylation_PTP_pY789/(kG_PTP*kM_PTP_phosphorylation_PTP)))/(1 + PTP/kM_PTP_phosphorylation_PTP + PTP_pY789/kM_PTP_phosphorylation_PTP_pY789));  // isVersionOf ec-code:2.7.10.2 GO:0004713
    kM_PTP_phosphorylation_PTP = 1; kM_PTP_phosphorylation_PTP_pY789 = 1; kV_PTP_phosphorylation = 1;
  // reversible thermodynamically independent convenience kinetics
  Cbp_phosphorylation: Cbp -> Cbp_P; kV_Cbp_phosphorylation*((Cbp/kM_Cbp_phosphorylation_Cbp*sqrt(kG_Cbp*kM_Cbp_phosphorylation_Cbp/(kG_Cbp_P*kM_Cbp_phosphorylation_Cbp_P)) - Cbp_P/kM_Cbp_phosphorylation_Cbp_P*sqrt(kG_Cbp_P*kM_Cbp_phosphorylation_Cbp_P/(kG_Cbp*kM_Cbp_phosphorylation_Cbp)))/(1 + Cbp/kM_Cbp_phosphorylation_Cbp + Cbp_P/kM_Cbp_phosphorylation_Cbp_P));  // isVersionOf ec-code:2.7.10.2 GO:0004713
    kM_Cbp_phosphorylation_Cbp = 1; kM_Cbp_phosphorylation_Cbp_P = 1; kV_Cbp_phosphorylation = 1;
end
