// SBML level 2 version 4

model TCellSignaltransductionMin200807()

  // Compartments:
  compartment default = 1 volume;
  compartment c1 in default = 1 volume;
  compartment c2 in c1 = 1 volume;
  compartment c3 in c1 = 1 volume;

  // Species:
  species CD3 in c1 = 3/c1;
  species AntiCD3 in default = 0.0064/default;
  species CD3_AntiCD3 in c1 = 0; CD3_AntiCD3 is "CD3-AntiCD3";
  species Lck in c1 = 3/c1;
  species CD3_AntiCD3_P in c1 = 0; CD3_AntiCD3_P is "CD3-AntiCD3-P";
  species CD3_AntiCD3_P_Zap70 in c1 = 0; CD3_AntiCD3_P_Zap70 is "CD3-AntiCD3-P-Zap70";
  species CD3_AntiCD3_P_Zap70_P in c1 = 0; CD3_AntiCD3_P_Zap70_P is "CD3-AntiCD3-P-Zap70-P";
  species Zap70 in c1 = 120/c1;
  species LAT in c1 = 15/c1;
  species LAT_P in c1 = 0; LAT_P is "LAT-P";
  species LAT_P_PLCy in c1 = 0; LAT_P_PLCy is "LAT-P-PLCy";
  species LAT_P_PLCy_Vav in c1 = 0; LAT_P_PLCy_Vav is "LAT-P-PLCy-Vav";
  species LAT_P_LPLCy_P_Vav_P in c1 = 0; LAT_P_LPLCy_P_Vav_P is "LAT-P-LPLCy-P-Vav-P";
  species PLCy in c1 = 8.82/c1;
  species Vav in c1 = 15/c1;
  species PIP2 in c1 = 18.3/c1;
  species PIP3 in c1 = 0;
  species IP3 in c1 = 0;
  species PIP3_ITK in c1 = 0; PIP3_ITK is "PIP3-ITK";
  species PIP3_Akt in c1 = 0; PIP3_Akt is "PIP3-Akt";
  species ITK in c1 = 10/c1;
  species AKT in c1 = 17/c1;
  species CD28_AntiCD28_P in c1 = 0; CD28_AntiCD28_P is "CD28-AntiCD28-P";
  species CD28_AntiCD28_P_PI3K in c1 = 0; CD28_AntiCD28_P_PI3K is "CD28-AntiCD28-P-PI3K";
  species CD28_AntiCD28 in c1 = 0; CD28_AntiCD28 is "CD28-AntiCD28";
  species CD28 in c1 = 10/c1;
  species AntiCD28 in default = 0.0064/default;
  species PI3K in c1 = 3/c1;
  species Ca2_int in c2 = 20/c2; Ca2_int is "Ca2+int";
  species Ca2_ext in c1 = 0; Ca2_ext is "Ca2+ext";
  species Calmodulin in c1 = 5/c1;
  species Calcineurin in c1 = 3/c1;
  species Calmodulin_2Ca in c1 = 0; Calmodulin_2Ca is "Calmodulin-2Ca";
  species Calmodulin_2Ca_Calcineurin in c1 = 0; Calmodulin_2Ca_Calcineurin is "Calmodulin-2Ca-Calcineurin";
  species GSK3 in c1 = 3/c1;
  species GSK3_P in c1 = 1/c1; GSK3_P is "GSK3-P";
  species GSK3_Dephosph in c1 = 10/c1; GSK3_Dephosph is "GSK3-Dephosph";
  species NFAT in c3 = 1.725/c3;
  species NFAT_P in c1 = 2/c1; NFAT_P is "NFAT-P";
  species csa13_degraded in c1 = 0;
  species csa12_degraded in c1 = 0;
  species csa2_degraded in c1 = 0;
  species csa3_degraded in c1 = 0;

  // Parameters:
  k1ass = 1;
  k2cat = 1;
  k2m = 1;
  k3cat = 1;
  k3m = 1;
  k4ass = 1;
  k5cat = 1;
  k5m = 1;
  k6ass = 1;
  k7ass = 1;
  k8cata = 1;
  k8catb = 1;
  k8ma = 1;
  k8mb = 1;
  k9cat = 1;
  k9m = 1;
  k13ass = 1;
  k14ass = 1;
  k15ass = 1;
  k16cat = 1;
  k16m = 1;
  k17ass = 1;
  k18cat = 1;
  k18m = 1;
  k19cat = 1;
  k19m = 1;
  k20ass = 1;
  k22ass = 1;
  k23cat = 0.1;
  k23m = 1;
  k24cat = 1;
  k24m = 1;
  k25cat = 1;
  k25m = 1;
  k26cat = 0.1;
  k26m = 1;
  k27int = 1;
  k28int = 1;
  k29int = 1;
  k30int = 1;

  // Reactions:
  re1: AntiCD3 + CD3 -> CD3_AntiCD3; k1ass*AntiCD3*CD3;
  re2: CD3_AntiCD3 => CD3_AntiCD3_P; k2cat*CD3_AntiCD3*Lck/(k2m + CD3_AntiCD3);  // modifiers: Lck
  re3: CD3_AntiCD3_P_Zap70 => CD3_AntiCD3_P_Zap70_P; k3cat*CD3_AntiCD3_P_Zap70*Lck/(k3m + CD3_AntiCD3_P_Zap70);  // modifiers: Lck
  re4: CD3_AntiCD3_P + Zap70 => CD3_AntiCD3_P_Zap70; k4ass*CD3_AntiCD3_P*Zap70;
  re5: LAT => LAT_P; k5cat*LAT*CD3_AntiCD3_P_Zap70_P/(k5m + LAT);  // modifiers: CD3_AntiCD3_P_Zap70_P
  re6: LAT_P + PLCy => LAT_P_PLCy; k6ass*LAT_P*PLCy;
  re7: LAT_P_PLCy + Vav => LAT_P_PLCy_Vav; k7ass*LAT_P_PLCy*Vav;
  re8: LAT_P_PLCy_Vav => LAT_P_LPLCy_P_Vav_P; k8cata*LAT_P_PLCy_Vav*CD3_AntiCD3_P_Zap70_P/(k8ma + LAT_P_PLCy_Vav) + k8catb*LAT_P_PLCy_Vav*PIP3_ITK/(k8mb + LAT_P_PLCy_Vav);  // modifiers: CD3_AntiCD3_P_Zap70_P, PIP3_ITK
  re9: PIP2 => PIP3; k9cat*PIP2*CD28_AntiCD28_P_PI3K/(k9m + PIP2);  // modifiers: CD28_AntiCD28_P_PI3K
  re13: PIP3 + ITK => PIP3_ITK; k13ass*PIP3*ITK;
  re14: PIP3 + AKT => PIP3_Akt; k14ass*PIP3*AKT;
  re15: AntiCD28 + CD28 -> CD28_AntiCD28; k15ass*AntiCD28*CD28;
  re16: CD28_AntiCD28 => CD28_AntiCD28_P; k16cat*CD28_AntiCD28*Lck/(k16m + CD28_AntiCD28);  // modifiers: Lck
  re17: CD28_AntiCD28_P + PI3K => CD28_AntiCD28_P_PI3K; k17ass*CD28_AntiCD28_P*PI3K;
  re18: PIP2 => IP3; k18cat*PIP2*LAT_P_LPLCy_P_Vav_P/(k18m + PIP2);  // modifiers: LAT_P_LPLCy_P_Vav_P
  re19: Ca2_int => Ca2_ext; k19cat*Ca2_int*IP3/(k19m + Ca2_int);  // modifiers: IP3
  re20: Ca2_ext + Calmodulin => Calmodulin_2Ca; k20ass*Ca2_ext*Calmodulin;
  re22: Calmodulin_2Ca + Calcineurin => Calmodulin_2Ca_Calcineurin; k22ass*Calmodulin_2Ca*Calcineurin;
  re23: NFAT => NFAT_P; k23cat*NFAT*GSK3/(k23m + NFAT);  // modifiers: GSK3
  re24: NFAT_P => NFAT; k24cat*NFAT_P*Calmodulin_2Ca_Calcineurin/(k24m + NFAT_P);  // modifiers: Calmodulin_2Ca_Calcineurin
  re25: GSK3 => GSK3_P; k25cat*GSK3*PIP3_Akt/(k25m + GSK3);  // modifiers: PIP3_Akt
  re26: GSK3_P => GSK3; k26cat*GSK3_P*GSK3_Dephosph/(k26m + GSK3_P);  // modifiers: GSK3_Dephosph
  re27: CD28_AntiCD28_P => csa13_degraded; k27int*CD28_AntiCD28_P;
  re29: CD28_AntiCD28_P_PI3K => csa12_degraded; k28int*CD28_AntiCD28_P_PI3K;
  re30: CD3_AntiCD3_P => csa2_degraded; k29int*CD3_AntiCD3_P;
  re31: CD3_AntiCD3_P_Zap70 => csa3_degraded; k30int*CD3_AntiCD3_P_Zap70;

  // Unit definitions:
  unit substance = mole;
  unit volume = litre;
  unit area = metre^2;
  unit length = metre;
  unit time = second;
end
