// SBML level 2 version 4

model TCellSignaltransductionMin200807()

  // Compartments:
  compartment default = 1 volume;
  compartment c1 in default = 1 volume;
  compartment c2 in c1 = 1 volume;
  compartment c3 in c1 = 1 volume;

  // Species:
  species CD3 in c1 = 3/c1;
  species AntiCD3 in default = 0.0064/default;
  species CD3_AntiCD3 in c1 = 0; CD3_AntiCD3 is "CD3-AntiCD3";
  species Lck in c1 = 3/c1;
  species CD3_AntiCD3_P in c1 = 0; CD3_AntiCD3_P is "CD3-AntiCD3-P";
  species CD3_AntiCD3_P_Zap70 in c1 = 0; CD3_AntiCD3_P_Zap70 is "CD3-AntiCD3-P-Zap70";
  species CD3_AntiCD3_P_Zap70_P in c1 = 0; CD3_AntiCD3_P_Zap70_P is "CD3-AntiCD3-P-Zap70-P";
  species Zap70 in c1 = 120/c1;
  species LAT in c1 = 15/c1;
  species LAT_P in c1 = 0; LAT_P is "LAT-P";
  species LAT_P_PLCy in c1 = 0; LAT_P_PLCy is "LAT-P-PLCy";
  species LAT_P_PLCy_Vav in c1 = 0; LAT_P_PLCy_Vav is "LAT-P-PLCy-Vav";
  species LAT_P_LPLCy_P_Vav_P in c1 = 0; LAT_P_LPLCy_P_Vav_P is "LAT-P-LPLCy-P-Vav-P";
  species PLCy in c1 = 8.82/c1;
  species Vav in c1 = 15/c1;
  species PIP2 in c1 = 18.3/c1;
  species PIP3 in c1 = 0;
  species IP3 in c1 = 0;
  species PIP3_ITK in c1 = 0; PIP3_ITK is "PIP3-ITK";
  species PIP3_Akt in c1 = 0; PIP3_Akt is "PIP3-Akt";
  species ITK in c1 = 10/c1;
  species AKT in c1 = 17/c1;
  species CD28_AntiCD28_P in c1 = 0; CD28_AntiCD28_P is "CD28-AntiCD28-P";
  species CD28_AntiCD28_P_PI3K in c1 = 0; CD28_AntiCD28_P_PI3K is "CD28-AntiCD28-P-PI3K";
  species CD28_AntiCD28 in c1 = 0; CD28_AntiCD28 is "CD28-AntiCD28";
  species CD28 in c1 = 10/c1;
  species AntiCD28 in default = 0.0064/default;
  species PI3K in c1 = 3/c1;
  species Ca2_int in c2 = 20/c2; Ca2_int is "Ca2+int";
  species Ca2_ext in c1 = 0; Ca2_ext is "Ca2+ext";
  species Calmodulin in c1 = 5/c1;
  species Calcineurin in c1 = 3/c1;
  species Calmodulin_2Ca in c1 = 0; Calmodulin_2Ca is "Calmodulin-2Ca";
  species Calmodulin_2Ca_Calcineurin in c1 = 0; Calmodulin_2Ca_Calcineurin is "Calmodulin-2Ca-Calcineurin";
  species GSK3 in c1 = 3/c1;
  species GSK3_P in c1 = 1/c1; GSK3_P is "GSK3-P";
  species GSK3_Dephosph in c1 = 10/c1; GSK3_Dephosph is "GSK3-Dephosph";
  species NFAT in c3 = 1.725/c3;
  species NFAT_P in c1 = 2/c1; NFAT_P is "NFAT-P";
  species csa13_degraded in c1 = 0;
  species csa12_degraded in c1 = 0;
  species csa2_degraded in c1 = 0;
  species csa3_degraded in c1 = 0;

  // Parameters:
  kG_s2 = 1 DIMENSIONLESS; kG_s2 is "Energy constant of species s2";
  kG_s1 = 1 DIMENSIONLESS; kG_s1 is "Energy constant of species s1";
  kG_s3 = 1 DIMENSIONLESS; kG_s3 is "Energy constant of species s3";
  kG_s5 = 1 DIMENSIONLESS; kG_s5 is "Energy constant of species s5";
  kG_s8 = 1 DIMENSIONLESS; kG_s8 is "Energy constant of species s8";
  kG_s6 = 1 DIMENSIONLESS; kG_s6 is "Energy constant of species s6";
  kG_s10 = 1 DIMENSIONLESS; kG_s10 is "Energy constant of species s10";
  kG_s14 = 1 DIMENSIONLESS; kG_s14 is "Energy constant of species s14";
  kG_s11 = 1 DIMENSIONLESS; kG_s11 is "Energy constant of species s11";
  kG_s15 = 1 DIMENSIONLESS; kG_s15 is "Energy constant of species s15";
  kG_s12 = 1 DIMENSIONLESS; kG_s12 is "Energy constant of species s12";
  kG_s17 = 1 DIMENSIONLESS; kG_s17 is "Energy constant of species s17";
  kG_s21 = 1 DIMENSIONLESS; kG_s21 is "Energy constant of species s21";
  kG_s19 = 1 DIMENSIONLESS; kG_s19 is "Energy constant of species s19";
  kG_s22 = 1 DIMENSIONLESS; kG_s22 is "Energy constant of species s22";
  kG_s20 = 1 DIMENSIONLESS; kG_s20 is "Energy constant of species s20";
  kG_s27 = 1 DIMENSIONLESS; kG_s27 is "Energy constant of species s27";
  kG_s26 = 1 DIMENSIONLESS; kG_s26 is "Energy constant of species s26";
  kG_s25 = 1 DIMENSIONLESS; kG_s25 is "Energy constant of species s25";
  kG_s24 = 1 DIMENSIONLESS; kG_s24 is "Energy constant of species s24";
  kG_s28 = 1 DIMENSIONLESS; kG_s28 is "Energy constant of species s28";
  kG_s23 = 1 DIMENSIONLESS; kG_s23 is "Energy constant of species s23";
  kG_s30 = 1 DIMENSIONLESS; kG_s30 is "Energy constant of species s30";
  kG_s31 = 1 DIMENSIONLESS; kG_s31 is "Energy constant of species s31";
  kG_s36 = 1 DIMENSIONLESS; kG_s36 is "Energy constant of species s36";
  kG_s33 = 1 DIMENSIONLESS; kG_s33 is "Energy constant of species s33";
  kG_s37 = 1 DIMENSIONLESS; kG_s37 is "Energy constant of species s37";

  // Reactions:
  re1: AntiCD3 + CD3 -> CD3_AntiCD3; vmag_re1*((AntiCD3*default/kmc_re1_s2*(CD3*c1/kmc_re1_s1)*sqrt(kG_s2*kmc_re1_s2*kG_s1*kmc_re1_s1/(kG_s3*kmc_re1_s3)) - CD3_AntiCD3*c1/kmc_re1_s3*sqrt(kG_s3*kmc_re1_s3/(kG_s2*kmc_re1_s2*kG_s1*kmc_re1_s1)))/((1 + AntiCD3*default/kmc_re1_s2)*(1 + CD3*c1/kmc_re1_s1) + CD3_AntiCD3*c1/kmc_re1_s3));
    kmc_re1_s2 = 1 substance; kmc_re1_s1 = 1 substance; kmc_re1_s3 = 1 substance; vmag_re1 = 1 substance_per_time;
  re2: CD3_AntiCD3 -> CD3_AntiCD3_P; Lck*c1*((kcrf_re2_s4*(CD3_AntiCD3*c1/kmc_re2_s3_s4)^hco_re2_s4 - kcrr_re2_s4*(CD3_AntiCD3*c1/kmc_re2_s3_s4)^hco_re2_s4)/(1 + (CD3_AntiCD3*c1/kmc_re2_s3_s4)^hco_re2_s4 + (CD3_AntiCD3_P*c1/kmc_re2_s5_s4)^hco_re2_s4));  // modifiers: Lck
    kcrf_re2_s4 = 1 per_second; hco_re2_s4 = 1 DIMENSIONLESS; kmc_re2_s3_s4 = 1 substance; kcrr_re2_s4 = 1 per_second; kmc_re2_s5_s4 = 1 substance;

  // Unit definitions:
  unit substance = 1e-3 mole;
  unit volume = 1e-3 litre;
  unit area = metre^2;
  unit length = metre;
  unit time = second;
  unit substance_per_time = 1e-3 mole / second;
  unit per_second = 1 / second; per_second is "Predefined unit time";
end
