// SBML level 2 version 1

model TCellSignaltransduction()

  // Compartments:
  compartment default = 1;
  compartment c1 in default = 1;
  compartment c2 in c1 = 1;
  compartment c3 in c1 = 1;

  // Species:
  species AntiCD3 in default = 0.0064/default;
  species CD28 in c1 = 12.4/c1;
  species AntiCD28 in default = 0.0064/default;
  species CD3_AntiCD3 in c1 = 0; CD3_AntiCD3 is "CD3-AntiCD3";
  species CD3_AntiCD3_P in c1 = 0; CD3_AntiCD3_P is "CD3-AntiCD3-P";
  species CD3_AntiCD3_P_ZAP_70 in c1 = 0; CD3_AntiCD3_P_ZAP_70 is "CD3-AntiCD3-P-ZAP-70";
  species ZAP_70 in c1 = 15/c1; ZAP_70 is "ZAP-70";
  species CD3_AntiCD3_ZAP_70_P in c1 = 0; CD3_AntiCD3_ZAP_70_P is "CD3-AntiCD3-ZAP-70-P";
  species CD28_AntiCD28 in c1 = 0; CD28_AntiCD28 is "CD28-AntiCD28";
  species CD28_AntiCD28_P in c1 = 0; CD28_AntiCD28_P is "CD28-AntiCD28-P";
  species CD28_AntiCD28_P_PI3K in c1 = 0; CD28_AntiCD28_P_PI3K is "CD28-AntiCD28-P-PI3K";
  species PIP2 in c1 = 50/c1;
  species PIP3 in c1 = 0;
  species IP3 in c1 = 0;
  species ITK in c1 = 10/c1;
  species PIP3_ITK_active in c1 = 0; PIP3_ITK_active is "PIP3-ITK-active";
  species AKT in c1 = 10/c1;
  species PIP3_AKT_active in c1 = 0; PIP3_AKT_active is "PIP3-AKT-active";
  species Ca2_int in c2 = 20/c2; Ca2_int is "Ca2+int";
  species Ca2_ext in c1 = 0; Ca2_ext is "Ca2+ext";
  species G_Aktin in c1 = 20/c1; G_Aktin is "G-Aktin";
  species F_Aktin in c1 = 0; F_Aktin is "F-Aktin";
  species RAC_GDP in c1 = 7.5/c1; RAC_GDP is "RAC-GDP";
  species RAC_GTP in c1 = 0; RAC_GTP is "RAC-GTP";
  species Gsk3 in c1 = 0;
  species Gsk3_P in c1 = 3/c1; Gsk3_P is "Gsk3-P";
  species NFAT in c3 = 1.725/c3;
  species NFAT_P in c1 = 2/c1; NFAT_P is "NFAT-P";
  species PI3K in c1 = 3/c1;
  species csa2_degraded in c1 = 0;
  species csa3_degraded in c1 = 0;
  species CD3 in c1 = 3/c1;
  species PLC_y in c1 = 10/c1; PLC_y is "PLC-y";
  species Vav in c1 = 15/c1;
  species Calmodulin in c1 = 5/c1;
  species Calcineurin in c1 = 3/c1;
  species Calmodulin_2Ca_Calcineurin in c1 = 0; Calmodulin_2Ca_Calcineurin is "Calmodulin-2Ca-Calcineurin";
  species Calmodulin_2Ca in c1 = 0; Calmodulin_2Ca is "Calmodulin-2Ca";
  species SHP_1_P in c1 = 0; SHP_1_P is "SHP-1-P";
  species SHP_1 in c1 = 3/c1; SHP_1 is "SHP-1";
  species Lck in c1 = 1/c1;
  species GSK_3_Deph_Active in c1 = 0; GSK_3_Deph_Active is "GSK-3-Deph-Active";
  species GSK_3_Deph in c1 = 3/c1; GSK_3_Deph is "GSK-3-Deph";
  species csa6_degraded in c1 = 0;
  species csa7_degraded in c1 = 0;
  species Lck_Active in c1 = 3/c1; Lck_Active is "Lck-Active";
  species RAC_GAP_Active in c1 = 0; RAC_GAP_Active is "RAC-GAP-Active";
  species RAC_GAP in c1 = 3/c1; RAC_GAP is "RAC-GAP";
  species Tyr_Phosph_Active in c1 = 0; Tyr_Phosph_Active is "Tyr-Phosph-Active";
  species Tyr_Phosph in c1 = 3/c1; Tyr_Phosph is "Tyr-Phosph";
  species SHIP in c1 = 0;
  species SHIP_Active in c1 = 0; SHIP_Active is "SHIP-Active";
  species LAT in c1 = 25/c1;
  species LAT_P in c1 = 0; LAT_P is "LAT-P";
  species LAT_P_PLCy in c1 = 0; LAT_P_PLCy is "LAT-P-PLCy";
  species LAT_P_Plcy_P_Vav_P in c1 = 0; LAT_P_Plcy_P_Vav_P is "LAT-P-Plcy-P-Vav-P";
  species LAT_P_PLCy_Vav in c1 = 0; LAT_P_PLCy_Vav is "LAT-P-PLCy-Vav";

  // Parameters:
  k1ass = 10000;
  k1diss = 1;
  k4ass = 12000000;
  k4diss = 0.11;
  k5ass = 1400000;
  k5diss = 1.6;
  k7ass = 10000000;
  k7diss = 0.1;
  k10cat = 5.3;
  k10m = 3.5e-5;
  k12cat = 5.3;
  k12m = 3.5e-5;
  k14ass = 10000000;
  k14diss = 0.1;
  k15ass = 3300000;
  k15diss = 0.6;
  k16cat = 5;
  k16m = 0.0001;
  k17acat = 5;
  k17am = 0.0001;
  k19cat = 0.51;
  k19m = 0.0001;
  k22cat = 5;
  k22m = 1e-7;
  k23cat = 0.00242;
  k23m = 0.1;
  k24cat = 0.006;
  k24m = 0.1;
  k31int = 0.03;
  k32int = 0.03;
  k17bcat = 5;
  k17bm = 0.0001;
  k42cat = 5;
  k42m = 0.0001;
  k38cat = 5.3;
  k38m = 3.5e-5;
  k39cat = 5.3;
  k39m = 3.5e-5;
  k40cat = 5.3;
  k40m = 3.5e-5;
  k45ass = 1000000;
  k45diss = 0.11;
  k53ass = 1000000;
  k53diss = 1;
  k54ass = 10000;
  k54diss = 1;
  k55cat = 5.4;
  k55m = 1e-5;
  k56cat = 5.4;
  k56m = 1e-5;
  k59cat = 5.4;
  k59m = 1e-5;
  k62cat = 5;
  k62m = 1e-5;
  k63cat = 5.4;
  k63m = 1e-5;
  k82cat = 5;
  k82m = 1e-5;
  k83cat = 5;
  k83m = 1e-5;
  k84cat = 5;
  k84m = 1e-5;
  k85cat = 5;
  k85m = 1e-5;
  k88cat = 5;
  k88m = 1e-5;
  k89cat = 5;
  k89m = 1e-5;
  k90cat = 5.4;
  k90m = 1e-5;
  k91cat = 5;
  k91m = 1e-5;
  k92int = 0.03;
  k95cat = 5;
  k95m = 1e-5;
  k96cat = 5;
  k96m = 1e-5;
  k97cat = 5;
  k97m = 1e-5;
  k99cat = 5;
  k99m = 1e-5;
  k100cat = 5;
  k100m = 1e-5;
  k103cat = 5.4;
  k103m = 1;
  k104int = 0.03;
  k106ass = 1000000;
  k106diss = 0.1;
  k107acat = 5.3;
  k107am = 1e-7;
  k107bcat = 5;
  k107bm = 0.035;
  k108cat = 5;
  k108m = 100;

  // Reactions:
  re1: AntiCD3 + CD3 => CD3_AntiCD3; k1ass*AntiCD3*CD3 - k1diss*CD3_AntiCD3;
  re4: CD3_AntiCD3_P + ZAP_70 => CD3_AntiCD3_P_ZAP_70; k4ass*CD3_AntiCD3_P*ZAP_70 - k4diss*CD3_AntiCD3_P_ZAP_70;
  re5: AntiCD28 + CD28 => CD28_AntiCD28; k5ass*AntiCD28*CD28 - k5diss*CD28_AntiCD28;
  re7: CD28_AntiCD28_P + PI3K => CD28_AntiCD28_P_PI3K; k7ass*CD28_AntiCD28_P*PI3K - k7diss*CD28_AntiCD28_P_PI3K;
  re10: LAT => LAT_P; k10cat*LAT*CD3_AntiCD3_ZAP_70_P/(k10m + LAT);  // modifiers: CD3_AntiCD3_ZAP_70_P
  re12: PIP2 => PIP3; k12cat*PIP2*CD28_AntiCD28_P_PI3K/(k12m + PIP2);  // modifiers: CD28_AntiCD28_P_PI3K
  re14: PIP3 + ITK => PIP3_ITK_active; k14ass*PIP3*ITK - k14diss*PIP3_ITK_active;
  re15: PIP3 + AKT => PIP3_AKT_active; k15ass*PIP3*AKT - k15diss*PIP3_AKT_active;
  re16: Ca2_int => Ca2_ext; k16cat*Ca2_int*IP3/(k16m + Ca2_int);  // modifiers: IP3
  re17: G_Aktin => F_Aktin; k17acat*G_Aktin*RAC_GTP/(k17am + G_Aktin) + k17bcat*G_Aktin*Ca2_ext/(k17bm + G_Aktin);  // modifiers: Ca2_ext, RAC_GTP
  re19: RAC_GDP => RAC_GTP; k19cat*RAC_GDP*LAT_P_Plcy_P_Vav_P/(k19m + RAC_GDP);  // modifiers: LAT_P_Plcy_P_Vav_P
  re22: Gsk3 => Gsk3_P; k22cat*Gsk3*PIP3_AKT_active/(k22m + Gsk3);  // modifiers: PIP3_AKT_active
  re23: NFAT => NFAT_P; k23cat*NFAT*Gsk3/(k23m + NFAT);  // modifiers: Gsk3
  re24: NFAT_P => NFAT; k24cat*NFAT_P*Calmodulin_2Ca_Calcineurin/(k24m + NFAT_P);  // modifiers: Calmodulin_2Ca_Calcineurin
  re31: CD3_AntiCD3_P => csa2_degraded; k31int*CD3_AntiCD3_P;
  re32: CD3_AntiCD3_P_ZAP_70 => csa3_degraded; k32int*CD3_AntiCD3_P_ZAP_70;
  re38: CD3_AntiCD3 => CD3_AntiCD3_P; k38cat*CD3_AntiCD3*Lck_Active/(k38m + CD3_AntiCD3);  // modifiers: Lck_Active
  re39: CD3_AntiCD3_P_ZAP_70 => CD3_AntiCD3_ZAP_70_P; k39cat*CD3_AntiCD3_P_ZAP_70*Lck_Active/(k39m + CD3_AntiCD3_P_ZAP_70);  // modifiers: Lck_Active
  re40: CD28_AntiCD28 => CD28_AntiCD28_P; k40cat*CD28_AntiCD28*Lck_Active/(k40m + CD28_AntiCD28);  // modifiers: Lck_Active
  re42: PIP2 => IP3; k42cat*PIP2*LAT_P_Plcy_P_Vav_P/(k42m + PIP2);  // modifiers: LAT_P_Plcy_P_Vav_P
  re45: LAT_P + PLC_y => LAT_P_PLCy; k45ass*LAT_P*PLC_y - k45diss*LAT_P_PLCy;
  re53: Ca2_ext + Calmodulin => Calmodulin_2Ca; k53ass*Ca2_ext*Calmodulin - k53diss*Calmodulin_2Ca;
  re54: Calmodulin_2Ca + Calcineurin => Calmodulin_2Ca_Calcineurin; k54ass*Calmodulin_2Ca*Calcineurin - k54diss*Calmodulin_2Ca_Calcineurin;
  re55: CD3_AntiCD3_P => CD3_AntiCD3; k55cat*CD3_AntiCD3_P*SHP_1_P/(k55m + CD3_AntiCD3_P);  // modifiers: SHP_1_P
  re56: CD3_AntiCD3_ZAP_70_P => CD3_AntiCD3_P_ZAP_70; k56cat*CD3_AntiCD3_ZAP_70_P*SHP_1_P/(k56m + CD3_AntiCD3_ZAP_70_P);  // modifiers: SHP_1_P
  re59: RAC_GTP => RAC_GDP; k59cat*RAC_GTP*RAC_GAP_Active/(k59m + RAC_GTP);  // modifiers: RAC_GAP_Active
  re62: CD28_AntiCD28_P => CD28_AntiCD28; k62cat*CD28_AntiCD28_P*Tyr_Phosph_Active/(k62m + CD28_AntiCD28_P);  // modifiers: Tyr_Phosph_Active
  re63: Gsk3_P => Gsk3; k63cat*Gsk3_P*GSK_3_Deph_Active/(k63m + Gsk3_P);  // modifiers: GSK_3_Deph_Active
  re82: SHP_1_P => SHP_1; k82cat*SHP_1_P*LAT_P/(k82m + SHP_1_P);  // modifiers: LAT_P
  re83: SHP_1 => SHP_1_P; k83cat*SHP_1*CD3_AntiCD3_ZAP_70_P/(k83m + SHP_1);  // modifiers: CD3_AntiCD3_ZAP_70_P
  re84: Lck_Active => Lck; k84cat*Lck_Active*SHP_1_P/(k84m + Lck_Active);  // modifiers: SHP_1_P
  re85: Lck => Lck_Active; k85cat*Lck*CD3_AntiCD3_ZAP_70_P/(k85m + Lck);  // modifiers: CD3_AntiCD3_ZAP_70_P
  re88: GSK_3_Deph => GSK_3_Deph_Active; k88cat*GSK_3_Deph*Calmodulin_2Ca_Calcineurin/(k88m + GSK_3_Deph);  // modifiers: Calmodulin_2Ca_Calcineurin
  re89: GSK_3_Deph_Active => GSK_3_Deph; k89cat*GSK_3_Deph_Active*NFAT_P/(k89m + GSK_3_Deph_Active);  // modifiers: NFAT_P
  re90: RAC_GAP_Active => RAC_GAP; k90cat*RAC_GAP_Active*RAC_GDP/(k90m + RAC_GAP_Active);  // modifiers: RAC_GDP
  re91: RAC_GAP => RAC_GAP_Active; k91cat*RAC_GAP*F_Aktin/(k91m + RAC_GAP);  // modifiers: F_Aktin
  re92: CD28_AntiCD28_P => csa6_degraded; k92int*CD28_AntiCD28_P;
  re95: Tyr_Phosph => Tyr_Phosph_Active; k95cat*Tyr_Phosph*LAT_P_Plcy_P_Vav_P/(k95m + Tyr_Phosph);  // modifiers: LAT_P_Plcy_P_Vav_P
  re96: Tyr_Phosph_Active => Tyr_Phosph; k96cat*Tyr_Phosph_Active*LAT/(k96m + Tyr_Phosph_Active);  // modifiers: LAT
  re97: LAT_P => LAT; k97cat*LAT_P*Tyr_Phosph_Active/(k97m + LAT_P);  // modifiers: Tyr_Phosph_Active
  re99: SHIP => SHIP_Active; k99cat*SHIP*IP3/(k99m + SHIP);  // modifiers: IP3
  re100: SHIP_Active => SHIP; k100cat*SHIP_Active*LAT_P_Plcy_P_Vav_P/(k100m + SHIP_Active);  // modifiers: LAT_P_Plcy_P_Vav_P
  re103: PIP3 => PIP2; k103cat*PIP3*SHIP_Active/(k103m + PIP3);  // modifiers: SHIP_Active
  re104: CD28_AntiCD28_P_PI3K => csa7_degraded; k104int*CD28_AntiCD28_P_PI3K;
  re106: LAT_P_PLCy + Vav => LAT_P_PLCy_Vav; k106ass*LAT_P_PLCy*Vav - k106diss*LAT_P_PLCy_Vav;
  re107: LAT_P_PLCy_Vav => LAT_P_Plcy_P_Vav_P; k107acat*LAT_P_PLCy_Vav*PIP3_ITK_active/(k107am + LAT_P_PLCy_Vav) + k107bcat*LAT_P_PLCy_Vav*CD3_AntiCD3_ZAP_70_P/(k107bm + LAT_P_PLCy_Vav);  // modifiers: PIP3_ITK_active, CD3_AntiCD3_ZAP_70_P
  re108: LAT_P_Plcy_P_Vav_P => LAT_P_PLCy_Vav; k108cat*LAT_P_Plcy_P_Vav_P*Tyr_Phosph_Active/(k108m + LAT_P_Plcy_P_Vav_P);  // modifiers: Tyr_Phosph_Active
end
