// SBML level 2 version 1
// Created with PySCeS (0.1.5) on Tue, 12 Apr 2005 22:21:42 for the JWS Online project by Jacky Snoep

model chassagnole1()
  // .
  // .
  // .
  // SBML level 2 code generated for the JWS Online project by Jacky Snoep using PySCeS
  // Run this model online at http://jjj.biochem.sun.ac.za
  // To cite JWS Online please refer to: Olivier, B.G. and Snoep, J.L. (2004) Web-based modelling using JWS Online, Bioinformatics, 20:2143-2144
  // .
  // .
  // .
  // .
  // .
  // .

  // Compartments:
  compartment compartment = 1;

  // Species:
  species cpep in compartment = 2.67;
  species cglcex in compartment = 0.0556;
  species cg6p in compartment = 3.48;
  species cpyr in compartment = 2.67;
  species cf6p in compartment = 0.6;
  species cg1p in compartment = 0.6525;
  species cpg in compartment = 0.8075;
  species cfdp in compartment = 0.272;
  species csed7p in compartment = 0.276;
  species cgap in compartment = 0.218;
  species ce4p in compartment = 0.098;
  species cxyl5p in compartment = 0.138;
  species crib5p in compartment = 0.398;
  species cdhap in compartment = 0.167;
  species cpgp in compartment = 0.008;
  species cpg3 in compartment = 2.131;
  species cpg2 in compartment = 0.399;
  species cribu5p in compartment = 0.111;
  species $X in compartment = 1;

  // Reactions:
  vPTS: cglcex + 65 cpep -> 65 cg6p + 65 cpyr; rmaxPTS*cglcex*cpep/cpyr/(KPTSa1 + KPTSa2*cpep/cpyr + KPTSa3*cglcex + cglcex*cpep/cpyr)/(1 + cg6p^nPTSg6p/KPTSg6p);
    rmaxPTS = 7829.78; KPTSa1 = 3082.3; KPTSa2 = 0.01; KPTSa3 = 245.3; nPTSg6p = 3.66; KPTSg6p = 2.15;
  vPGI: cg6p -> cf6p; rmaxPGI*(cg6p - cf6p/KPGIeq)/(KPGIg6p*(1 + cf6p/KPGIf6p/(1 + cpg/KPGIf6ppginh) + cpg/KPGIg6ppginh) + cg6p);
    rmaxPGI = 650.9879; KPGIeq = 0.1725; KPGIg6p = 2.9; KPGIf6p = 0.266; KPGIf6ppginh = 0.2; KPGIg6ppginh = 0.2;
  vPGM: cg6p -> cg1p; rmaxPGM*(cg6p - cg1p/KPGMeq)/(KPGMg6p*(1 + cg1p/KPGMg1p) + cg6p);
    rmaxPGM = 0.8398243; KPGMeq = 0.196; KPGMg6p = 1.038; KPGMg1p = 0.0136;
  vG6PDH: cg6p -> cpg; rmaxG6PDH*cg6p*vG6PDH_cnadp/(cg6p + KG6PDHg6p)/(1 + vG6PDH_cnadph/KG6PDHnadphg6pinh)/(KG6PDHnadp*(1 + vG6PDH_cnadph/KG6PDHnadphnadpinh) + vG6PDH_cnadp);
    rmaxG6PDH = 1.380197; vG6PDH_cnadp = 0.195; KG6PDHg6p = 14.4; vG6PDH_cnadph = 0.062; KG6PDHnadphg6pinh = 6.43; KG6PDHnadp = 0.0246; KG6PDHnadphnadpinh = 0.01;
  vPFK: cf6p -> cfdp; rmaxPFK*vPFK_catp/(vPFK_catp + KPFKatps*(1 + vPFK_cadp/KPFKadpc))*cf6p/(cf6p + KPFKf6ps*(1 + cpep/KPFKpep + vPFK_cadp/KPFKadpb + vPFK_camp/KPFKampb)/(1 + vPFK_cadp/KPFKadpa + vPFK_camp/KPFKampa))/(1 + LPFK/(1 + cf6p/KPFKf6ps/(1 + cpep/KPFKpep + vPFK_cadp/KPFKadpb + vPFK_camp/KPFKampb)*(1 + vPFK_cadp/KPFKadpa + vPFK_camp/KPFKampa))^nPFK);
    rmaxPFK = 1840.585; vPFK_catp = 4.27; KPFKatps = 0.123; vPFK_cadp = 0.595; KPFKadpc = 4.14; KPFKf6ps = 0.325; KPFKpep = 3.26; KPFKadpb = 3.89; vPFK_camp = 0.955; KPFKampb = 3.2; KPFKadpa = 128; KPFKampa = 19.1; LPFK = 5629067; nPFK = 11.1;
  vTA: cgap + csed7p -> cf6p + ce4p; rmaxTA*(cgap*csed7p - ce4p*cf6p/KTAeq);
    rmaxTA = 10.87164; KTAeq = 1.05;
  vTKA: crib5p + cxyl5p -> cgap + csed7p; rmaxTKa*(crib5p*cxyl5p - csed7p*cgap/KTKaeq);
    rmaxTKa = 9.473385; KTKaeq = 1.2;
  vTKB: ce4p + cxyl5p -> cgap + cf6p; rmaxTKb*(cxyl5p*ce4p - cf6p*cgap/KTKbeq);
    rmaxTKb = 86.55856; KTKbeq = 10;
  vMURSyNTH: 2 cf6p -> $X; rmaxMurSynth;
    rmaxMurSynth = 0.00043711;
  vALDO: cfdp -> cdhap + cgap; rmaxALDO*(cfdp - cgap*cdhap/kALDOeq)/(kALDOfdp + cfdp + kALDOgap/kALDOeq/VALDOblf*cdhap + kALDOdhap/kALDOeq/VALDOblf*cgap + cfdp*cgap/kALDOgapinh + cgap*cdhap/VALDOblf/kALDOeq);
    rmaxALDO = 17.41464; kALDOeq = 0.144; kALDOfdp = 1.75; kALDOgap = 0.088; VALDOblf = 2; kALDOdhap = 0.088; kALDOgapinh = 0.6;
  vGAPDH: cgap -> cpgp; rmaxGAPDH*(cgap*cnad - cpgp*cnadh/KGAPDHeq)/(KGAPDHgap*(1 + cpgp/KGAPDHpgp) + cgap)/(KGAPDHnad*(1 + cnadh/KGAPDHnadh) + cnad);
    rmaxGAPDH = 921.5943; cnad = 1.47; cnadh = 0.1; KGAPDHeq = 0.63; KGAPDHgap = 0.683; KGAPDHpgp = 1.04e-5; KGAPDHnad = 0.252; KGAPDHnadh = 1.09;
  vTIS: cdhap -> cgap; rmaxTIS*(cdhap - cgap/kTISeq)/(kTISdhap*(1 + cgap/kTISgap) + cdhap);
    rmaxTIS = 68.67474; kTISeq = 1.39; kTISdhap = 2.8; kTISgap = 0.3;
  vTRPSYNTH: $X -> cpyr + cgap; rmaxTrpSynth;
    rmaxTrpSynth = 0.001037;
  vG3PDH: cdhap -> $X; rmaxG3PDH*cdhap/(KG3PDHdhap + cdhap);
    rmaxG3PDH = 0.01162043; KG3PDHdhap = 1;
  vPGK: cpgp -> cpg3; rmaxPGK*(vPGK_cadp*cpgp - vPGK_catp*cpg3/KPGKeq)/(KPGKadp*(1 + vPGK_catp/KPGKatp) + vPGK_cadp)/(KPGKpgp*(1 + cpg3/KPGKpg3) + cpgp);
    rmaxPGK = 3021.774; vPGK_cadp = 0.595; vPGK_catp = 4.27; KPGKeq = 1934.4; KPGKadp = 0.185; KPGKatp = 0.653; KPGKpgp = 0.0468; KPGKpg3 = 0.473;
  vsersynth: cpg3 -> $X; rmaxSerSynth*cpg3/(KSerSynthpg3 + cpg3);
    rmaxSerSynth = 0.025712107; KSerSynthpg3 = 1;
  vrpGluMu: cpg3 -> cpg2; rmaxPGluMu*(cpg3 - cpg2/KPGluMueq)/(KPGluMupg3*(1 + cpg2/KPGluMupg2) + cpg3);
    rmaxPGluMu = 89.04965; KPGluMueq = 0.188; KPGluMupg3 = 0.2; KPGluMupg2 = 0.369;
  vENO: cpg2 -> cpep; rmaxENO*(cpg2 - cpep/KENOeq)/(KENOpg2*(1 + cpep/KENOpep) + cpg2);
    rmaxENO = 330.4476; KENOeq = 6.73; KENOpg2 = 0.1; KENOpep = 0.135;
  vPK: cpep -> cpyr; rmaxPK*cpep/KPKpep*(cpep/KPKpep + 1)^(nPK - 1)/(LPK*((1 + vPK_catp/KPKatp)/(cfdp/KPKfdp + vPK_camp/KPKamp + 1))^nPK + (cpep/KPKpep + 1)^nPK)*vPK_cadp/(vPK_cadp + KPKadp);
    rmaxPK = 0.0611315; KPKpep = 0.31; nPK = 4; LPK = 1000; vPK_catp = 4.27; KPKatp = 22.5; KPKfdp = 0.19; vPK_camp = 0.955; KPKamp = 0.2; vPK_cadp = 0.595; KPKadp = 0.26;
  vpepCxylase: cpep -> $X; rmaxpepCxylase*cpep*(1 + (cfdp/KpepCxylasefdp)^npepCxylasefdp)/(KpepCxylasepep + cpep);
    rmaxpepCxylase = 0.1070206; KpepCxylasefdp = 0.7; npepCxylasefdp = 4.21; KpepCxylasepep = 4.07;
  vSynth1: cpep -> $X; rmaxSynth1*cpep/(KSynth1pep + cpep);
    rmaxSynth1 = 0.01953897; KSynth1pep = 1;
  vSynth2: cpyr -> $X; rmaxSynth2*cpyr/(KSynth2pyr + cpyr);
    rmaxSynth2 = 0.07361855; KSynth2pyr = 1;
  vDAHPS: ce4p + cpep -> $X; rmaxDAHPS*ce4p^nDAHPSe4p*cpep^nDAHPSpep/(KDAHPSe4p + ce4p^nDAHPSe4p)/(KDAHPSpep + cpep^nDAHPSpep);
    rmaxDAHPS = 0.1079531; nDAHPSe4p = 2.6; nDAHPSpep = 2.2; KDAHPSe4p = 0.035; KDAHPSpep = 0.0053;
  vPDH: cpyr -> $X; rmaxPDH*cpyr^nPDH/(KPDHpyr + cpyr^nPDH);
    rmaxPDH = 6.059531; nPDH = 3.68; KPDHpyr = 1159;
  vMethSynth: $X -> cpyr; rmaxMetSynth;
    rmaxMetSynth = 0.0022627;
  vPGDH: cpg -> cribu5p; rmaxPGDH*cpg*vPGDH_cnadp/(cpg + KPGDHpg)/(vPGDH_cnadp + KPGDHnadp*(1 + vPGDH_cnadph/KPGDHnadphinh)*(1 + vPGDH_catp/KPGDHatpinh));
    rmaxPGDH = 16.23236; vPGDH_cnadp = 0.195; KPGDHpg = 37.5; KPGDHnadp = 0.0506; vPGDH_cnadph = 0.062; KPGDHnadphinh = 0.0138; vPGDH_catp = 4.27; KPGDHatpinh = 208;
  vR5PI: cribu5p -> crib5p; rmaxR5PI*(cribu5p - crib5p/KR5PIeq);
    rmaxR5PI = 4.83841193; KR5PIeq = 4;
  vRu5P: cribu5p -> cxyl5p; rmaxRu5P*(cribu5p - cxyl5p/KRu5Peq);
    rmaxRu5P = 6.739029; KRu5Peq = 1.4;
  vPPK: crib5p -> $X; rmaxRPPK*crib5p/(KRPPKrib5p + crib5p);
    rmaxRPPK = 0.01290045; KRPPKrib5p = 0.1;
  vG1PAT: cg1p -> $X; rmaxG1PAT*cg1p*vG1PAT_catp*(1 + (cfdp/KG1PATfdp)^nG1PATfdp)/(KG1PATatp + vG1PAT_catp)/(KG1PATg1p + cg1p);
    rmaxG1PAT = 0.007525458; vG1PAT_catp = 4.27; KG1PATfdp = 0.119; nG1PATfdp = 1.2; KG1PATatp = 4.42; KG1PATg1p = 3.2;
  vG6P: cg6p -> $X; vG6P_mu*cg6p;
    vG6P_mu = 2.78e-5;
  vf6P: cf6p -> $X; vf6P_mu*cf6p;
    vf6P_mu = 2.78e-5;
  vfdP: cfdp -> $X; vfdP_mu*cfdp;
    vfdP_mu = 2.78e-5;
  vGAP: cgap -> $X; vGAP_mu*cgap;
    vGAP_mu = 2.78e-5;
  vDHAP: cdhap -> $X; vDHAP_mu*cdhap;
    vDHAP_mu = 2.78e-5;
  vPGP: cpgp -> $X; vPGP_mu*cpgp;
    vPGP_mu = 2.78e-5;
  vPG3: cpg3 -> $X; vPG3_mu*cpg3;
    vPG3_mu = 2.78e-5;
  vpg2: cpg2 -> $X; vpg2_mu*cpg2;
    vpg2_mu = 2.78e-5;
  vPEP: cpep -> $X; vPEP_mu*cpep;
    vPEP_mu = 2.78e-5;
  vRibu5p: cribu5p -> $X; vRibu5p_mu*cribu5p;
    vRibu5p_mu = 2.78e-5;
  vRIB5P: crib5p -> $X; vRIB5P_mu*crib5p;
    vRIB5P_mu = 2.78e-5;
  vXYL5P: cxyl5p -> $X; vXYL5P_mu*cxyl5p;
    vXYL5P_mu = 2.78e-5;
  vSED7P: csed7p -> $X; vSED7P_mu*csed7p;
    vSED7P_mu = 2.78e-5;
  vpyr: cpyr -> $X; vpyr_mu*cpyr;
    vpyr_mu = 2.78e-5;
  vPG: cpg -> $X; vPG_mu*cpg;
    vPG_mu = 2.78e-5;
  vE4P: ce4p -> $X; vE4P_mu*ce4p;
    vE4P_mu = 2.78e-5;
  vGLP: cg1p -> $X; vGLP_mu*cg1p;
    vGLP_mu = 2.78e-5;
  vEXTER: $X -> cglcex; Dil*(cfeed - cglcex);
    Dil = 2.78e-5; cfeed = 110.96;
end
