// SBML level 2 version 1

model test()

  // Compartments:
  compartment default = 1;

  // Species:
  species $s1 in default = 1/default;
  species s2 in default = 0;
  species s3 in default = 0;
  species s4 in default = 1/default;
  species sa3_degraded in default = 0;
  species sa2_degraded in default = 0;

  // Parameters:
  np_re1_s1 = 1;
  nm_re1_s3 = 1;
  kg_re1 = 1;
  np_re2_s4 = 1;
  np_re2_s2 = 1;
  kg_re2 = 1;
  kass_re3 = 0.1;
  kdiss_re3 = 0.1;
  kSp_re1_s1 = 1;
  kSm_re1_s3 = 1;
  kSp_re2_s4 = 1;
  kSp_re2_s2 = 1;
  kass_re5 = 1;
  kdiss_re5 = 1;

  // Reactions:
  // Hill equation, microscopic form
  re1: $s1 -> s2; kg_re1*(s1^np_re1_s1/(s1^np_re1_s1 + kSp_re1_s1^np_re1_s1))*(1 - s3^nm_re1_s3/(s3^nm_re1_s3 + kSm_re1_s3^nm_re1_s3));  // modifiers: s3
  // Hill equation, microscopic form
  re2: s2 -> s3; kg_re2*(s4^np_re2_s4/(s4^np_re2_s4 + kSp_re2_s4^np_re2_s4))*(s2^np_re2_s2/(s2^np_re2_s2 + kSp_re2_s2^np_re2_s2));  // modifiers: s4
  // mass action rate law for zeroth order forward, first order reverse, reversible reactions, continuous scheme
  re3: s3 -> sa3_degraded; kass_re3*s3 - kdiss_re3*sa3_degraded;
  // mass action rate law for first order forward, first order reverse, reversible reactions, continuous scheme
  re5: s2 -> sa2_degraded; kass_re5*s2 - kdiss_re5*sa2_degraded;
end
